// SBML level 2 version 4

function Function_for_AProd(B, cell, vAProd, vBasalAProd)
  (cell*vAProd*B + vBasalAProd)/cell;
end

function Function_for_BProd(A, kBProd)
  kBProd*A;
end

model model1()

  // Compartments:
  compartment cell = 1;

  // Species:
  species A in cell = 0;
  species B in cell = 0;

  // Parameters:
  vAProd = 0.1;
  kADeg = 0.2;
  kBProd = 0.3;
  kBDeg = 0.4;
  vBasalAProd = 0.001;

  // Reactions:
  AProd: => A; cell*Function_for_AProd(B, cell, vAProd, vBasalAProd);  // modifiers: B
  ADeg: A => ; cell*kADeg*A;
  BProd: => B; cell*Function_for_BProd(A, kBProd);  // modifiers: A
  BDeg: B => ; cell*kBDeg*B;
end
