// SBML level 3 version 1

model TestModel1()
  // model units - substance: substance, volume: volume

  // Compartments:
  compartment nuc = 1;
  compartment cyt = 3;

  // Species:
  species A in nuc = 1;
  species B in nuc = 1;
  species C in nuc = 1;

  // Parameters:
  A2B = 4;
  B2C = 9;
  B2C_0_k2 = 0.1;
  C2A_k1 = 0.1;
  ADeg_k1 = 0.1;

  // Assignment rules:
  ThisIsAssignment := A2B + B2C;

  // Reactions:
  A2B_0: A => B; nuc*A2B*A;
  B2C_0: B -> C; nuc*(B2C*B - B2C_0_k2*C);
  C2A: C => A; nuc*C2A_k1*C;
  ADeg: A => ; nuc*ADeg_k1*A;

  // Unit definitions:
  unit volume = 1e-3 litre;
  unit substance = 1e-3 mole;
end
